# 3d protein simulation

units real

timestep 2

dimension	3

boundary s s s
#boundary p p p

neighbor	20 bin
neigh_modify	delay 5

atom_modify sort 0 0.0

special_bonds fene

atom_style	awsemmd

bond_style harmonic

#pair_style vexcluded 2 3.5 3.5
pair_style hybrid/overlay coul/debye 1.4 10.0 vexcluded 2 3.5 3.5

#read_data data.CaM_CaMKIIp
read_data data.1cll_CaMKIIp_AAA
#read_restart unbind_CaMp_restart_AAA.equil

#pair_coeff * * 0.0
#pair_coeff 1 1 20.0 3.5 4.5
#pair_coeff 1 4 20.0 3.5 4.5
#pair_coeff 4 4 20.0 3.5 4.5
#pair_coeff 3 3 20.0 3.5 3.5

pair_coeff * * vexcluded 0.0
pair_coeff 1 1 vexcluded 20.0 3.5 4.5
pair_coeff 1 4 vexcluded 20.0 3.5 4.5
pair_coeff 4 4 vexcluded 20.0 3.5 4.5
pair_coeff 3 3 vexcluded 20.0 3.5 3.5
pair_coeff 4 4 coul/debye 80

#velocity	all create 300.0 2349852 rot yes dist gaussian
velocity	all create TEMP SEED

group		alpha_carbons id 1 4 7 10 13 16 19 22 25 28 31 34 37 40 43 46 49 52 55 58 61 64 67 70 73 76 79 82 85 88 91 94 97 100 103 106 109 112 115 118 121 124 127 130 133 136 139 142 145 148 151 154 157 160 163 166 169 172 175 178 181 184 187 190 193 196 199 202 205 208 211 214 217 220 223 226 229 232 235 238 241 244 247 250 253 256 259 262 265 268 271 274 277 280 283 286 289 292 295 298 301 304 307 310 313 316 319 322 325 328 331 334 337 340 343 346 349 352 355 358 361 364 367 370 373 376 379 382 385 388 391 394 397 400 403 406 409 412 415 418 421 424 427 430 433 436 439 442 445 448 451 454 457 460 463 466 469 472 475 478 481

group		beta_atoms id 3 6 9 12 15 18 21 24 27 30 33 36 39 42 45 48 51 54 57 60 63 66 69 72 75 78 81 84 87 90 93 96 99 102 105 108 111 114 117 120 123 126 129 132 135 138 141 144 147 150 153 156 159 162 165 168 171 174 177 180 183 186 189 192 195 198 201 204 207 210 213 216 219 222 225 228 231 234 237 240 243 246 249 252 255 258 261 264 267 270 273 276 279 282 285 288 291 294 297 300 303 306 309 312 315 318 321 324 327 330 333 336 339 342 345 348 351 354 357 360 363 366 369 372 375 378 381 384 387 390 393 396 399 402 405 408 411 414 417 420 423 426 429 432 435 438 441 444 447 450 453 456 459 462 465 468 471 474 477 480 483

group		oxygens id 2 5 8 11 14 17 20 23 26 29 32 35 38 41 44 47 50 53 56 59 62 65 68 71 74 77 80 83 86 89 92 95 98 101 104 107 110 113 116 119 122 125 128 131 134 137 140 143 146 149 152 155 158 161 164 167 170 173 176 179 182 185 188 191 194 197 200 203 206 209 212 215 218 221 224 227 230 233 236 239 242 245 248 251 254 257 260 263 266 269 272 275 278 281 284 287 290 293 296 299 302 305 308 311 314 317 320 323 326 329 332 335 338 341 344 347 350 353 356 359 362 365 368 371 374 377 380 383 386 389 392 395 398 401 404 407 410 413 416 419 422 425 428 431 434 437 440 443 446 449 452 455 458 461 464 467 470 473 476 479 482

group		CaM_P id 430 433 436 439 442 445 448 451 454 457 460 463 466 469 472 475 478 481

group		CaM_P_all id 1 4 7 10 13 16 19 22 25 28 31 34 37 40 43 46 49 52 55 58 61 64 67 70 73 76 79 82 85 88 91 94 97 100 103 106 109 112 115 118 121 124 127 130 133 136 139 142 145 148 151 154 157 160 163 166 169 172 175 178 181 184 187 190 193 196 199 202 205 208 211 214 217 220 223 226 229 232 235 238 241 244 247 250 253 256 259 262 265 268 271 274 277 280 283 286 289 292 295 298 301 304 307 310 313 316 319 322 325 328 331 334 337 340 343 346 349 352 355 358 361 364 367 370 373 376 379 382 385 388 391 394 397 400 403 406 409 412 415 418 421 424 427

#group		CaM_P_all id 178 181 184 187 190 193 196 199 202 205 208 211 214 217 220 223 226 229 232 235 238 241 244 247 250 253 256 259 262 265 268

group		negative_atoms id 5 8 20 29 47 53 59 80 122 128 137 149 155 161 179 188 221 227 233 236 239 248 266 272 299 329 341 344 347 353 356 368 374 380 386 404 407

group		positive_atoms id 26 50 77 98 209 212 218 245 257 269 305 332 365 452

set group negative_atoms charge -1.0
set group positive_atoms charge 1.0

group		ef14 id 47 53 59 80 374 380 386 407
group		ef23 id 155 161 188 266 272 299
group		ef3 id 266 272 299
group		ef1 id 47 53 59 80
group		ef2 id 155 161 188
group		ef4 id 374 380 386 407

set group ef14 charge -0.5
set group ef23 charge -0.33

#fix		1 all nvt temp 300.0 300.0 100.0
fix		1 all nvt temp TEMP TEMP $(100.0*dt)
fix		2 alpha_carbons backbone beta_atoms oxygens fix_backbone_coeff_20_1_AAA.data CaM_CaMKIIp_AAA.seq
fix		3 all momentum 100 linear 1 1 1 angular
#fix		4 CaM_P_all spring couple CaM_P 2 0 0 0 80 #Unbinding
fix		4 CaM_P_all spring couple CaM_P 0.01 0 0 0 10 #Binding

fix		5 alpha_carbons spring/rg 50 RG0

compute      2 alpha_carbons qwolynes CaM_CaMKIIp.dat 2 0.15
compute rg alpha_carbons gyration

dielectric 80

variable E_bond  equal emol
variable E_chain equal f_2[1]
variable E_excl  equal epair
variable E_chi   equal f_2[3]
variable E_rama  equal f_2[4]
variable E_dssp  equal f_2[6]
variable E_pap   equal f_2[7]
variable E_water equal f_2[8]
variable E_burial equal f_2[9]
variable E_helix equal f_2[10]
variable E_fmem  equal f_2[12]
variable E_P     equal v_E_chain+v_E_chi+v_E_rama+v_E_water+v_E_helix+v_E_fmem+v_E_excl+v_E_dssp+v_E_pap+v_E_bond
variable E_P     equal v_E_chain+v_E_chi+v_E_rama+v_E_water+v_E_helix+v_E_fmem+v_E_excl+v_E_dssp+v_E_pap+v_E_bond+v_E_burial
variable E_K     equal ke
variable E_total equal v_E_P+v_E_K
variable Step equal step
variable tempe equal temp
variable Rg equal c_rg


variable qw equal c_2

variable tempe equal temp

fix energy all print 1000 "${Step} ${tempe} ${qw} ${E_chain} ${E_bond} ${E_chi} ${E_rama} ${E_excl} ${E_dssp} ${E_pap} ${E_water} ${E_burial} ${E_helix} ${E_fmem} ${E_P} ${Rg}" file COND/COND_B_energy_AAA.txt screen no

thermo		1000
dump		1 all atom 1000 COND/COND_dump_AAA.lammpstrj

dump_modify	1 sort id

#restart		10000 restart

reset_timestep	0
#minimize	0.0 1.0e-8 1000 100000
run		5000000
#run		10000
#write_restart COND/COND_unbind_CaMp_restart_AAA.equil
write_restart COND/COND_bind_CaMp_restart_AAA.equil
